*Heading
** Job name: inc-03-01 Model name: inc-03-01
** Generated by: Abaqus/CAE 2020
*Preprint, echo=NO, model=NO, history=NO, contact=NO
** ----------------------------------------------------------------
**
** PART INSTANCE: crack
**
*Node
      1,   5.02259398,  -1.19394064
      2,   4.92438793,  -1.21279764
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*Element, type=CPE4R
 1,  28,  29, 830, 829
 2,  29,  30, 831, 830
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*Nset, nset=crack_all, generate
    1,  6684,     1
*Elset, elset=crack_all, generate
    1,  6455,     1
*Nset, nset=crack_bulk, generate
    1,  6684,     1
*Elset, elset=crack_bulk, generate
    1,  6455,     1
*Nset, nset=crack_top-edge
  23,  24, 624, 625, 626, 627
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*Elset, elset=crack_top-edge
 1116, 1126, 1133, 1134, 1142, 1145, 1146, 1148, 1149, 1152, 1334, 1829, 5697, 5700, 5702, 5733
*Nset, nset=crack_bot-edge
  21,  22, 559, 560, 561, 562
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*Elset, elset=crack_bot-edge
 1102, 1104, 1105, 1107, 1232, 1294, 1297, 2392, 4225, 5624, 5683, 5684, 5690, 5704, 5705, 5707
*Nset, nset=crack_finer-edges
  15,  16,  20,  21,  22,  23
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*Elset, elset=crack_finer-edges
  904,  906, 1058, 1060, 1062, 1079
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*Nset, nset=crack_line-hole-00
  25, 711, 712, 713, 714, 715
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*Elset, elset=crack_line-hole-00
 1068, 1069, 1070, 1071, 1078, 1080
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*Nset, nset=crack_crack-tip00
 1,
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** Section: steel
*Solid Section, elset=crack_bulk, material=steel
,
*System
*Node
   6685,           4.,         4.25,           0.
*Node
   6686,           4.,        -4.25,           0.
*Nset, nset=RP-bot
6686,
*Nset, nset=RP-top
6685,
*Nset, nset=xsym
 599,
*Surface, type=NODE, name=crack_bot-edge_CNS_
crack_bot-edge, 1.
*Surface, type=NODE, name=crack_top-edge_CNS_
crack_top-edge, 1.
** Constraint: Constraint-3
*Equation
2
RP-bot, 6, 1.
RP-top, 6, -1.
** Constraint: Couple-Y-bot
*Coupling, constraint name=Couple-Y-bot, ref node=RP-bot, surface=crack_bot-edge_CNS_
*Kinematic
2, 2
** Constraint: Couple-Y-top
*Coupling, constraint name=Couple-Y-top, ref node=RP-top, surface=crack_top-edge_CNS_
*Kinematic
2, 2
**
** MATERIALS
**
*Material, name=steel
*Elastic
3000., 0.3
**
** BOUNDARY CONDITIONS
**
** Name: fix-x Type: Displacement/Rotation
*Boundary
xsym, 1, 1
** ----------------------------------------------------------------
**
** STEP: load-000
**
*Step, name=load-000, nlgeom=YES, inc=1000
*Static
1., 1., 1e-08, 1.
**
** BOUNDARY CONDITIONS
**
** Name: appl-uyy-bot Type: Displacement/Rotation
*Boundary
RP-bot, 1, 1
RP-bot, 2, 2, -0.01
RP-bot, 6, 6
** Name: appl-uyy-top Type: Displacement/Rotation
*Boundary
RP-top, 1, 1
RP-top, 2, 2, 0.01
RP-top, 6, 6
**
** OUTPUT REQUESTS
**
*Restart, write, frequency=0
**
** FIELD OUTPUT: FO-2
**
*Output, field
**
*Element Output, directions=YES
            COORD,IVOL,
**
*Node Output
COORD,
*Node Output
COORD,
*Element Output, directions=YES
ENER,
**
** FIELD OUTPUT: F-Output-1
**
*Output, field, variable=PRESELECT
**
** HISTORY OUTPUT: HO-2
**
*Output, history
*Node Output, nset=RP-top
RF1, RF2, U1, U2
**
** HISTORY OUTPUT: H-Output-1
**
*Output, history, variable=PRESELECT
**
** HISTORY OUTPUT: H-Output-3
**
*Contour Integral, crack name=H-Output-3_Crack-0, contours=5, crack tip nodes, type=K FACTORS, normal
0.188281, -0.982115, 0.
crack_crack-tip00, crack_crack-tip00
*End Step
